l1 := 0.8
l2 := 0.9
l3 := 1
a := 0.3
b := 0.2
c := 0.5
d := 0.3
# переход из левой СК в начальное
# положение в правой СК
# переход из начального положения
# в текущее в той же СК
# переход из левой СК
# в текущее положение в
# правой СК
H01' := [1, 0, 0, 0; 0, 1, 0, 0; 0, 0, 1, 0; 0, 0, 0, 1]
H1'1 := [cos(q1), -sin(q1), 0, 0; sin(q1), cos(q1), 0, 0; 0, 0, 1, 0; 0, 0, 0, 1]
H01 := H01'*H1'1 → [cos(q1), -sin(q1), 0, 0; sin(q1), cos(q1), 0, 0; 0, 0, 1, 0; 0, 0, 0, 1]
H12' := [0, 0, 1, 0; 1, 0, 0, 0; 0, 1, 0, l1; 0, 0, 0, 1]
H2'2 := [cos(q2), -sin(q2), 0, 0; sin(q2), cos(q2), 0, 0; 0, 0, 1, 0; 0, 0, 0, 1]
H12 := H12'*H2'2 → [0, 0, 1, 0; cos(q2), -sin(q2), 0, 0; sin(q2), cos(q2), 0, 0.8; 0, 0, 0, 1]
H23' := [1, 0, 0, 0; 0, 1, 0, l2; 0, 0, 1, 0; 0, 0, 0, 1]
H3'3 := [cos(q3), -sin(q3), 0, 0; sin(q3), cos(q3), 0, 0; 0, 0, 1, 0; 0, 0, 0, 1]
H23 := H23'*H3'3 → [cos(q3), -sin(q3), 0, 0; sin(q3), cos(q3), 0, 0.9; 0, 0, 1, 0; 0, 0, 0, 1]
Rm3 := [l3; 0; 0; 1]  # начальное положение манипулятора в 3 СК
Rm0 := H01*H12*H23*Rm3
Rm0 simplify →  # error: This variable is undefined.
Xm := Rm0[0]
Ym := Rm0[1]
Zm := Rm0[2]
q31 := asin((Xm^2 + Ym^2 + (Zm - l1)^2 - l3^2 - l2^2)/(2*l2*l3))
# правую брать
cq22 := det([-sqrt(Xm^2 + Ym^2), -l3*sin(q31) - l2; Zm - l1, l3*cos(q31)])/det([l3*cos(q31), -l3*sin(q31) - l2; l3*sin(q31) + l2, l3*cos(q31)])
sq22 := det([l3*cos(q31), -sqrt(Xm^2 + Ym^2); l3*sin(q31) + l2, Zm - l1])/det([l3*cos(q31), -l3*sin(q31) - l2; l3*sin(q31) + l2, l3*cos(q31)])
q22 := atan2(cq22, sq22)
sq12 := (Xm/(l3*cos(q22 + q31) - l2*sin(q22)))
cq12 := (Ym/(l3*cos(q22 + q31) - l2*sin(q22)))
q12 := atan2(cq12, sq12)
t3 := 1.5  # Это будет время дохождения до точки В, в которой начинаем рисовать
R := 0.2
V := 0.6
h := 0.4
tp := 6*π*R/V = 6.28319  # время рисования
t := t3, t3 + 0.1 .. t3 + tp
α(t) := V*(t - t3)/R  # центральный угол. смотреть на спираль сверху
γ := atan(h/(2*π*R))  # угол подъёма. смотреть на спираль сбоку
xst(t) := -R*sin(α(t))
yst(t) := R*cos(α(t))
zst(t) := 3*h - V*(t - t3)*tan(γ)
Rmst(t) := [xst(t); yst(t); zst(t)]  # траектория винта в его личной СК
t4 := t3 + tp  # В это время оказываемся в точке С, точке конца таектории
F := CreateSpace(Rmst, t3, t4, 1000)
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H0st := [1, 0, 0, 0; 0, 1, 0, 1.3; 0, 0, 1, 0.1; 0, 0, 0, 1]  # матрица перехода из 0 СК в СК стола (у меня его нет, но это как бы СК, в которых рисуется винт)
Rmst(t) := [xst(t); yst(t); zst(t); 1]  # траектория винта в его личной СК
Rmb0(t) := H0st*Rmst(t)  # описание траектории в нулевой СК
Rmb0(t3) = [0; 1.5; 1.3; 1]  # положение манипулятора (в СК0) в момент начала рисования траектории
Rmb0(t4) = [0; 1.5; 0.1; 1]  # положение манипулятора (в СК0) в момент окончания рисования траектории
x(t) := Rmb0(t)[0]
y(t) := Rmb0(t)[1]
z(t) := Rmb0(t)[2]
q3bc(t) := asin((x(t)^2 + y(t)^2 + (z(t) - l1)^2 - l3^2 - l2^2)/(2*l2*l3))
cq22bc(t) := det([sqrt(x(t)^2 + y(t)^2), -l3*sin(q3bc(t)) - l2; z(t) - l1, l3*cos(q3bc(t))])/det([l3*cos(q3bc(t)), -l3*sin(q3bc(t)) - l2; l3*sin(q3bc(t)) + l2, l3*cos(q3bc(t))])
# у корней знаки поменялись
sq22bc(t) := det([l3*cos(q3bc(t)), sqrt(x(t)^2 + y(t)^2); l3*sin(q3bc(t)) + l2, z(t) - l1])/det([l3*cos(q3bc(t)), -l3*sin(q3bc(t)) - l2; l3*sin(q3bc(t)) + l2, l3*cos(q3bc(t))])
q22bc(t) := atan2(cq22bc(t), sq22bc(t))
sq12bc(t) := (-x(t)/(l3*cos(q22bc(t) + q3bc(t)) - l2*sin(q22bc(t))))  # здесь знак наоборот
cq12bc(t) := (y(t)/(l3*cos(q22bc(t) + q3bc(t)) - l2*sin(q22bc(t))))
q12bc(t) := atan2(cq12bc(t), sq12bc(t))
rm0(t) := [
    -sin(q12bc(t))*(l3*cos(q22bc(t) + q3bc(t)) - l2*sin(q22bc(t)));
    cos(q12bc(t))*(l3*cos(q22bc(t) + q3bc(t)) - l2*sin(q22bc(t)));
    l1 + l3*sin(q22bc(t) + q3bc(t)) + l2*cos(q22bc(t))
]
N := CreateSpace(rm0, t3, t4, 100)
dq3bc(t) := d/dt(q3bc(t))
dq22bc(t) := d/dt(q22bc(t))
dq12bc(t) := d/dt(q12bc(t))
ddq3bc(t) := d/dt(dq3bc(t))
ddq22bc(t) := d/dt(dq22bc(t))
ddq12bc(t) := d/dt(dq12bc(t))
t1 := 0.5  # до этого времени разгоняемся
t2 := 1  # до этого времени едем с постоянной скоростью
t3 = 1.5  # до этого времени тормозим
Φ(t) :=
    1 if t ≥ 0
    0 otherwise  # самодельная функция Хэвисайда
ap := 1  # disabled
at := 1  # disabled
t := 0, 0.01 .. t3
qsab''(t) := ap*t/t1 - ap/t1*(t - t1)*Φ(t - t1) - ap*Φ(t - t1) - at*Φ(t - t2)
qsab'(t) := ap*t^2/(2*t1) - ap*(t - t1)^2/(2*t1)*Φ(t - t1) - ap*(t - t1)*Φ(t - t1) - at*(t - t2)*Φ(t - t2)
qsab(t) := ap*t^3/(6*t1) - ap*(t - t1)^3/(6*t1)*Φ(t - t1) - ap*(t - t1)^2/2*Φ(t - t1) - at*(t - t2)^2/2*Φ(t - t2)
qsab(t3) simplify → 0.291666666667*ap - 0.125*at
qsab'(t3) simplify → 0.25*ap - 0.5*at
ap1 := det([q12bc(t3), -0.125; dq12bc(t3 + 0.0001), -0.5])/det([0.291666666667, -0.125; 0.25, -0.5]) = -0.436364
at1 := det([0.291666666667, q12bc(t3); 0.25, dq12bc(t3 + 0.0001)])/det([0.291666666667, -0.125; 0.25, -0.5]) = -1.01818
ap2 := det([q22bc(t3), -0.125; dq22bc(t3 + 0.0001), -0.5])/det([0.291666666667, -0.125; 0.25, -0.5]) = -2.67086
at2 := det([0.291666666667, q22bc(t3); 0.25, dq22bc(t3 + 0.0001)])/det([0.291666666667, -0.125; 0.25, -0.5]) = -1.23021
ap3 := det([q3bc(t3), -0.125; dq3bc(t3 + 0.0001), -0.5])/det([0.291666666667, -0.125; 0.25, -0.5]) = 1.84229
at3 := det([0.291666666667, q3bc(t3); 0.25, dq3bc(t3 + 0.0001)])/det([0.291666666667, -0.125; 0.25, -0.5]) = 1.15146
q1ab''(t) := ap1*t/t1 - ap1/t1*(t - t1)*Φ(t - t1) - ap1*Φ(t - t1) - at1*Φ(t - t2)
q2ab''(t) := ap2*t/t1 - ap2/t1*(t - t1)*Φ(t - t1) - ap2*Φ(t - t1) - at2*Φ(t - t2)
q1ab'(t) := ap1*t^2/(2*t1) - ap1*(t - t1)^2/(2*t1)*Φ(t - t1) - ap1*(t - t1)*Φ(t - t1) - at1*(t - t2)*Φ(t - t2)
q2ab'(t) := ap2*t^2/(2*t1) - ap2*(t - t1)^2/(2*t1)*Φ(t - t1) - ap2*(t - t1)*Φ(t - t1) - at2*(t - t2)*Φ(t - t2)
q1ab(t) := ap1*t^3/(6*t1) - ap1*(t - t1)^3/(6*t1)*Φ(t - t1) - ap1*(t - t1)^2/2*Φ(t - t1) - at1*(t - t2)^2/2*Φ(t - t2)
q2ab(t) := ap2*t^3/(6*t1) - ap2*(t - t1)^3/(6*t1)*Φ(t - t1) - ap2*(t - t1)^2/2*Φ(t - t1) - at2*(t - t2)^2/2*Φ(t - t2)
q3ab''(t) := ap3*t/t1 - ap3/t1*(t - t1)*Φ(t - t1) - ap3*Φ(t - t1) - at3*Φ(t - t2)
q3ab'(t) := ap3*t^2/(2*t1) - ap3*(t - t1)^2/(2*t1)*Φ(t - t1) - ap3*(t - t1)*Φ(t - t1) - at3*(t - t2)*Φ(t - t2)
q1ab(t3) = 0
q12bc(t3) = 0
q3ab(t) := ap3*t^3/(6*t1) - ap3*(t - t1)^3/(6*t1)*Φ(t - t1) - ap3*(t - t1)^2/2*Φ(t - t1) - at3*(t - t2)^2/2*Φ(t - t2)
q1(t) :=
    q1ab(t) if 0 ≤ t ≤ t3
    q12bc(t) if t3 ≤ t ≤ t4
q2(t) :=
    q2ab(t) if 0 ≤ t ≤ t3
    q22bc(t) if t3 ≤ t ≤ t4
q3(t) :=
    q3ab(t) if 0 ≤ t ≤ t3
    q3bc(t) if t3 ≤ t ≤ t4
dq1(t) :=
    q1ab'(t) if 0 ≤ t ≤ t3
    dq12bc(t) if t3 ≤ t ≤ t4
dq2(t) :=
    q2ab'(t) if 0 ≤ t ≤ t3
    dq22bc(t) if t3 ≤ t ≤ t4
dq3(t) :=
    q3ab'(t) if 0 ≤ t ≤ t3
    dq3bc(t) if t3 ≤ t ≤ t4
ddq1(t) :=
    q1ab''(t) if 0 ≤ t ≤ t3
    ddq12bc(t) if t3 ≤ t ≤ t4
ddq2(t) :=
    q2ab''(t) if 0 ≤ t ≤ t3
    ddq22bc(t) if t3 ≤ t ≤ t4
ddq3(t) :=
    q3ab''(t) if 0 ≤ t ≤ t3
    ddq3bc(t) if t3 ≤ t ≤ t4
Rm0(t) := [
    -sin(q1(t))*(l3*cos(q2(t) + q3(t)) - l2*sin(q2(t)));
    cos(q1(t))*(l3*cos(q2(t) + q3(t)) - l2*sin(q2(t)));
    l1 + l3*sin(q2(t) + q3(t)) + l2*cos(q2(t))
]
Q := CreateSpace(Rm0, 0, t4, 100)
# Угловые скорости звеньев
# матрицы поворота
H01 := H01'*H1'1 → [cos(q1), -sin(q1), 0, 0; sin(q1), cos(q1), 0, 0; 0, 0, 1, 0; 0, 0, 0, 1]
A01(t) := [cos(q1(t)), -sin(q1(t)), 0; sin(q1(t)), cos(q1(t)), 0; 0, 0, 1]
H12 := H12'*H2'2 → [0, 0, 1, 0; cos(q2), -sin(q2), 0, 0; sin(q2), cos(q2), 0, 0.8; 0, 0, 0, 1]
A12(t) := [0, 0, 1; cos(q2(t)), -sin(q2(t)), 0; sin(q2(t)), cos(q2(t)), 0]
H23 := H23'*H3'3 → [cos(q3), -sin(q3), 0, 0; sin(q3), cos(q3), 0, 0.9; 0, 0, 1, 0; 0, 0, 0, 1]
A23(t) := [cos(q3(t)), -sin(q3(t)), 0; sin(q3(t)), cos(q3(t)), 0; 0, 0, 1]
Ω00(t) := [0; 0; 0]
ω11(t) := [0; 0; dq1(t)]
ω22(t) := [0; 0; dq2(t)]
ω33(t) := [0; 0; dq3(t)]
Ω01(t) := transpose(A01(t))*Ω00(t)
Ω11(t) := Ω01(t) + ω11(t)
Ω12(t) := transpose(A12(t))*Ω11(t)
Ω22(t) := Ω12(t) + ω22(t)
Ω23(t) := transpose(A23(t))*Ω22(t)
Ω33(t) := Ω23(t) + ω33(t)
# Угловые ускорения звеньев
E00(t) := [0; 0; 0]
ε11(t) := [0; 0; ddq1(t)]
ε22(t) := [0; 0; ddq2(t)]
ε33(t) := [0; 0; ddq3(t)]
E11(t) := transpose(A01(t))*E00(t) + Ω11(t)×ω11(t) + ε11(t)
E22(t) := transpose(A12(t))*E11(t) + Ω22(t)×ω22(t) + ε22(t)
E33(t) := transpose(A23(t))*E22(t) + Ω33(t)×ω33(t) + ε33(t)
# Определение скоростей точек звеньев
ro10(t) := [0; 0; 0]
ro21(t) := [0; 0; l1]
ro32(t) := [0; l2; 0]
rM3(t) := [l3; 0; 0]
Vo00(t) := [0; 0; 0]
νo10(t) := [0; 0; 0]
νo21(t) := [0; 0; 0]
νo32(t) := [0; 0; 0]
Vo11(t) := transpose(A01(t))*(Vo00(t) + Ω00(t)×ro10(t) + νo10(t))
Vo22(t) := transpose(A12(t))*(Vo11(t) + Ω11(t)×ro21(t) + νo21(t))
Vo33(t) := transpose(A23(t))*(Vo22(t) + Ω22(t)×ro32(t) + νo32(t))
VM3(t) := Vo33(t) + Ω33(t)×rM3(t)  # скорость схвата промышленного робота
modVM3(t) := sqrt(VM3(t)[0]^2 + VM3(t)[1]^2 + VM3(t)[2]^2)
Rm0(t) := [
    -sin(q1(t))*(l3*cos(q2(t) + q3(t)) - l2*sin(q2(t)));
    cos(q1(t))*(l3*cos(q2(t) + q3(t)) - l2*sin(q2(t)));
    l1 + l3*sin(q2(t) + q3(t)) + l2*cos(q2(t))
]
modVM0(t) := sqrt((d/dt(Rm0(t)[0]))^2 + (d/dt(Rm0(t)[1]))^2 + (d/dt(Rm0(t)[2]))^2)
t := 0, 0.1 .. t4
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# Определение ускорений точек звеньев
Wo00(t) := [0; 0; 0]
Wo10(t) := [0; 0; 0]
Wo21(t) := [0; 0; 0]
Wo32(t) := [0; 0; 0]
Wo11(t) := transpose(A01(t))*(Wo00(t) + E00(t)×ro10(t) + Ω00(t)×(Ω00(t)×ro10(t)) + 2*Ω00(t)×νo10(t) + Wo10(t))
Wo22(t) := transpose(A12(t))*(Wo11(t) + E11(t)×ro21(t) + Ω11(t)×(Ω11(t)×ro21(t)) + 2*Ω11(t)×νo21(t) + Wo21(t))
Wo33(t) := transpose(A23(t))*(Wo22(t) + E22(t)×ro32(t) + Ω22(t)×(Ω22(t)×ro32(t)) + 2*Ω22(t)×νo32(t) + Wo32(t))
Wm3(t) := Wo33(t) + E33(t)×rM3(t) + Ω33(t)×(Ω33(t)×rM3(t))  # ускорение схвата промышленного робота
# значение W1m3 вычислено в символьном файле
# по методу Филатова. Сошлось с Wm3
W1m3(t) := [
    dq1(t)^2*l2*sin(2*q2(t) + q3(t))/2 - dq2(t)^2*l3 - dq3(t)^2*l3 - 2*dq2(t)*dq3(t)*l3 - ddq2(t)*l2*cos(q3(t)) - dq1(t)^2*l3*cos(2*q2(t) + 2*q3(t))/2 - dq1(t)^2*l2*sin(q3(t))/2 - dq2(t)^2*l2*sin(q3(t)) - dq1(t)^2*l3/2;
    ddq2(t)*l3 + ddq3(t)*l3 + ddq2(t)*l2*sin(q3(t)) + dq1(t)^2*l3*sin(2*q2(t) + 2*q3(t))/2 - dq1(t)^2*l2*cos(q3(t))/2 - dq2(t)^2*l2*cos(q3(t)) + dq1(t)^2*l2*cos(2*q2(t) + q3(t))/2;
    ddq1(t)*l2*sin(q2(t)) - ddq1(t)*l3*cos(q2(t) + q3(t)) + 2*dq1(t)*dq2(t)*l3*sin(q2(t) + q3(t)) + 2*dq1(t)*dq3(t)*l3*sin(q2(t) + q3(t)) + 2*dq1(t)*dq2(t)*l2*cos(q2(t))
]
modW1m3(t) := sqrt(W1m3(t)[0]^2 + W1m3(t)[1]^2 + W1m3(t)[2]^2)
modWm3(t) := sqrt(Wm3(t)[0]^2 + Wm3(t)[1]^2 + Wm3(t)[2]^2)
modW_M0(t) := sqrt((d^2/dt^2(Rm0(t)[0]))^2 + (d^2/dt^2(Rm0(t)[1]))^2 + (d^2/dt^2(Rm0(t)[2]))^2)
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t := 0, 0.05 .. t4
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# Скорости и ускорения центров масс звеньев
rc11 := [0; 0; l1/2]
Vc11(t) := Vo11(t) + Ω11(t)×rc11
Wc11(t) := Wo11(t) + E11(t)×rc11 + Ω11(t)×(Ω11(t)×rc11)
rc22 := [0; l2/2; 0]
Vc22(t) := Vo22(t) + Ω22(t)×rc22
Wc22(t) := Wo22(t) + E22(t)×rc22 + Ω22(t)×(Ω22(t)×rc22)
rc33 := [l3/2; 0; 0]
Vc33(t) := Vo33(t) + Ω33(t)×rc33
Wc33(t) := Wo33(t) + E33(t)×rc33 + Ω33(t)×(Ω33(t)×rc33)
# Динамика робота с жесткими звеньями
ρ := 7800
R_1 := 0.1*l1
R_2 := 0.05*l2
R_3 := 0.025*l3  # радиусы звеньев
m_1 := ρ*π*R_1^2*l1 = 125.463
m_2 := ρ*π*R_2^2*l2 = 44.6593
m_3 := ρ*π*R_3^2*l3 = 15.3153  # массы звеньев
J_z1 := m_1*R_1^2/2
J_x1 := m_1/12*((3*R_1)^2 + l1^2)
J_y1 := m_1/12*((3*R_1)^2 + l1^2)  # моменты инерции звена относительно осей
Ic1 := [J_x1, 0, 0; 0, J_y1, 0; 0, 0, J_z1]  # тензор инерции звена относительно центра масс
J_x2 := m_2/12*((3*R_2)^2 + l2^2)
J_z2 := m_2/12*((3*R_2)^2 + l2^2)
J_y2 := m_2*R_2^2/2
Ic2 := [J_x2, 0, 0; 0, J_y2, 0; 0, 0, J_z2]
J_x3 := m_3*R_3^2/2
J_y3 := m_3/12*((3*R_3)^2 + l3^2) = 1.28345
J_z3 := m_3/12*((3*R_3)^2 + l3^2)
Ic3 := [J_x3, 0, 0; 0, J_y3, 0; 0, 0, J_z3]
# силы и моменты инерции
F_11(t) := -m_1*Wc11(t)
L_C11(t) := -(Ic1*E11(t) + Ω11(t)×(Ic1*Ω11(t)))
F_22(t) := -m_2*Wc22(t)
L_C22(t) := -(Ic2*E22(t) + Ω22(t)×(Ic2*Ω22(t)))
F_33(t) := -m_3*Wc33(t)
L_C33(t) := -(Ic3*E33(t) + Ω33(t)×(Ic3*Ω33(t)))
# силы тяжести
g := 9.8
G_10 := [0; 0; -m_1*g]
G_20 := [0; 0; -m_2*g]
G_30 := [0; 0; -m_3*g]
A02(t) := A01(t)*A12(t)
A03(t) := A01(t)*A12(t)*A23(t)
G_11(t) := transpose(A01(t))*G_10
G_22(t) := transpose(A02(t))*G_20
G_33(t) := transpose(A03(t))*G_30
# 3-е звено:
t := 0, 0.5 .. t4
# вектор из центра масс 3 звена в начало координат 3 СК. Считается в ск третьего звена
R_23(t) := -G_33(t) - F_33(t)
C3O3(t) := [-l3/2; 0; 0]
M_23(t) := -L_C33(t) - C3O3(t)×R_23(t)
Q_3(t) := M_23(t)[2]
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# 2-е звено
R_32(t) := -A23(t)*R_23(t)
C2O2(t) := [0; -l2/2; 0]
C2O3(t) := [0; l2/2; 0]
R_12(t) := -R_32(t) - G_22(t) - F_22(t)
M_32(t) := -A23(t)*M_23(t)
M_12(t) := -M_32(t) - L_C22(t) - C2O3(t)×R_32(t) - C2O2(t)×R_12(t)
Q_2(t) := M_12(t)[2]
t := 0, 1 .. t4
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# 1-е звено
R_21(t) := -A12(t)*R_12(t)
C1O2 := [0; 0; l1/2]
C1O1 := [0; 0; -l1/2]
R_01(t) := -R_21(t) - G_11(t) - F_11(t)
M_21(t) := -A12(t)*M_12(t)
M_01(t) := -M_21(t) - L_C11(t) - C1O2×R_21(t) - C1O1×R_01(t)
Q_1(t) := M_01(t)[2]
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H_01(t) := [cos(q1(t)), -sin(q1(t)), 0, 0; sin(q1(t)), cos(q1(t)), 0, 0; 0, 0, 1, 0; 0, 0, 0, 1]
H_12(t) := [0, 0, 1, 0; cos(q2(t)), -sin(q2(t)), 0, 0; sin(q2(t)), cos(q2(t)), 0, 0.8; 0, 0, 0, 1]
H_23(t) := [cos(q3(t)), -sin(q3(t)), 0, 0; sin(q3(t)), cos(q3(t)), 0, 0.9; 0, 0, 1, 0; 0, 0, 0, 1]
rc33 := [l3/2; 0; 0]
R_C33 := [l3/2; 0; 0; 1]
R_C30(t) := H_01(t)*H_12(t)*H_23(t)*R_C33
rc22 := [0; l2/2; 0]
R_C22 := [0; l2/2; 0; 1]
R_C20(t) := H_01(t)*H_12(t)*R_C22
rc11 := [0; 0; l1/2]
R_C11 := [0; 0; l1/2; 1]
R_C10(t) := H_01(t)*R_C11
# Вычислим обобщенные моменты сопротивления, дифференцируя по координатам в символьном файле
Q_C3(t) := -m_3*g*(d/d(q3(t))(R_C30(t)[2]))  # error: A name is required here.
Q_C2(t) := -m_3*g*(d/d(q2(t))(R_C30(t)[2])) - m_2*g*(d/d(q2(t))(R_C20(t)[2]))  # error: A name is required here.
Q_C1(t) := -m_3*g*(d/d(q1(t))(R_C30(t)[2])) - m_2*g*(d/d(q1(t))(R_C20(t)[2])) - m_1*g*(d/d(q1(t))(R_C10(t)[2]))  # error: A name is required here.
# получим:
Q_C3(t) := -g*l3*m_3*cos(q2(t) + q3(t))/2
Q_C2(t) := 0.5*g*l2*m_2*sin(q2(t)) - g*m_3*(-0.9*sin(q2(t)) + 0.5*l3*cos(q2(t) + q3(t)))
Q_C1(t) := 0
# уравнения Лагранжа 2-го рода
T_1 := 1/2*m_1*transpose(Vc11)*Vc11 + 1/2*transpose(Ω11)*(Ic1*Ω11)
T_2 := 1/2*m_2*transpose(Vc22)*Vc22 + 1/2*transpose(Ω22)*(Ic2*Ω22)
T_3 := 1/2*m_3*transpose(Vc33)*Vc33 + 1/2*transpose(Ω33)*(Ic3*Ω33)
T := T_1 + T_2 + T_3
dTdq1(t) := 0
dTddq1(t) := dq1(t)*(4*J_x2 + 4*J_x3 + 4*J_y2 + 8*J_z1 + 4*J_y3 - 4*J_x2*cos(2*q2(t)) + 4*J_y2*cos(2*q2(t)) + l2^2*m_2 + 4*l2^2*m_3 + l3^2*m_3 - 4*J_x3*cos(2*q2(t) + 2*q3(t)) + 4*J_y3*cos(2*q2(t) + 2*q3(t)) - l2^2*m_2*cos(2*q2(t)) - 4*l2^2*m_3*cos(2*q2(t)) + l3^2*m_3*cos(2*q2(t) + 2*q3(t)) + 4*l2*l3*m_3*sin(q3(t)) - 4*l2*l3*m_3*sin(2*q2(t) + q3(t)))/8
dTdq2(t) := dq1(t)^2*(4*J_x2*sin(2*q2(t)) - 4*J_y2*sin(2*q2(t)) + 4*J_x3*sin(2*q2(t) + 2*q3(t)) - 4*J_y3*sin(2*q2(t) + 2*q3(t)) + l2^2*m_2*sin(2*q2(t)) + 4*l2^2*m_3*sin(2*q2(t)) - l3^2*m_3*sin(2*q2(t) + 2*q3(t)) - 4*l2*l3*m_3*cos(2*q2(t) + q3(t)))/8
dTddq2(t) := J_z2*dq2(t) + J_z3*dq2(t) + J_z3*dq3(t) + dq2(t)*l2^2*m_2/4 + dq2(t)*l2^2*m_3 + dq2(t)*l3^2*m_3/4 + dq3(t)*l3^2*m_3/4 + dq2(t)*l2*l3*m_3*sin(q3(t)) + dq3(t)*l2*l3*m_3*sin(q3(t))/2
dTdq3(t) := J_x3*dq1(t)^2*sin(2*q2(t) + 2*q3(t))/2 - J_y3*dq1(t)^2*sin(2*q2(t) + 2*q3(t))/2 - dq1(t)^2*l3^2*m_3*sin(2*q2(t) + 2*q3(t))/8 + dq1(t)^2*l2*l3*m_3*cos(q3(t))/4 + dq2(t)^2*l2*l3*m_3*cos(q3(t))/2 - dq1(t)^2*l2*l3*m_3*cos(2*q2(t) + q3(t))/4 + dq2(t)*dq3(t)*l2*l3*m_3*cos(q3(t))/2
dTddq3(t) := J_z3*dq2(t) + J_z3*dq3(t) + dq2(t)*l3^2*m_3/4 + dq3(t)*l3^2*m_3/4 + dq2(t)*l2*l3*m_3*sin(q3(t))/2
Q_3L(t) := d/dt(dTddq3(t)) - dTdq3(t) - Q_C3(t)
Q_2L(t) := d/dt(dTddq2(t)) - dTdq2(t) - Q_C2(t)
Q_1L(t) := d/dt(dTddq1(t)) - dTdq1(t) - Q_C1(t)
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t := 0, 0.05 .. t4
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t := 0, 0.05 .. t4
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t := 0, 0.1 .. t4
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# Геометрические и кинематические ошибки
# 1-е звено | 2-е звено | 3-е звено
D_ξ1x1 := 0  # Нулевая и первая СК совпадают, поэтому линейных отклонений нет
D_ξ2x2 := (10^-5*l1)^2
# ошибка в выставлении координаты
D_ξ3x3(t) := (10^-5*l2)^2
D_ξ1y1 := 0  # для 7 квалитета и длины 800мм
# для 7 квалитета и длины 900мм
D_ξ1z1 := 0
D_ξ2y2(t) := (10^-6*90/6)^2
D_ξ3y3(t) := (10^-6*90/6)^2
D_ξ2z2(t) := (10^-5*l1)^2
D_ξ3z3(t) := (10^-5*l2)^2
D_θ1x1 := (1.8*10^-4)^2
# Неправильность
# выставления угла
# одной СК относительно
# другой
D_θ2x2 := (1.8*10^-4)^2
D_θ3x3 := (1.8*10^-4)^2
D_θ1y1 := (1.8*10^-4)^2
D_θ2y2 := (1.8*10^-4)^2
D_θ3y3 := (1.8*10^-4)^2
# кинематическая ошибка привода при угловом
# движении по оси
D_θ1z1 := (2.7*10^-4)^2
D_θ2z2 := (2.7*10^-4)^2
D_θ3z3 := (2.7*10^-4)^2
H_12(t) := [0, 0, 1, 0; cos(q2(t)), -sin(q2(t)), 0, 0; sin(q2(t)), cos(q2(t)), 0, 0.8; 0, 0, 0, 1]
H_23(t) := [cos(q3(t)), -sin(q3(t)), 0, 0; sin(q3(t)), cos(q3(t)), 0, 0.9; 0, 0, 1, 0; 0, 0, 0, 1]
R_M3 := [l3; 0; 0; 1]
R_M2(t) := H_23(t)*R_M3
R_M1(t) := H_12(t)*R_M2(t)
D_1(t) := D_ξ1x1 + D_ξ1y1 + D_ξ1z1 + D_θ1x1*(R_M1(t)[1]^2 + R_M1(t)[2]^2) + D_θ1y1*(R_M1(t)[0]^2 + R_M1(t)[2]^2) + D_θ1z1*(R_M1(t)[0]^2 + R_M1(t)[1]^2)
D_2(t) := D_ξ2x2 + D_ξ2y2(t) + D_ξ2z2(t) + D_θ2x2*(R_M2(t)[1]^2 + R_M2(t)[2]^2) + D_θ2y2*(R_M2(t)[0]^2 + R_M2(t)[2]^2) + D_θ2z2*(R_M2(t)[0]^2 + R_M2(t)[1]^2)
D_3(t) := D_ξ3x3(t) + D_ξ3y3(t) + D_ξ3z3(t) + D_θ3x3*(R_M3[1]^2 + R_M3[2]^2) + D_θ3y3*(R_M3[0]^2 + R_M3[2]^2) + D_θ3z3*(R_M3[0]^2 + R_M3[1]^2)
D_rM0(t) := D_1(t) + D_2(t) + D_3(t)
σrm(t) := sqrt(D_rM0(t))
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# Расчет редуктора с учетом податливостей звеньев
# Вариант задания: 2.6
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# коэффициенты для соединений
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d_1 := 0.028
D_1 := 0.1
l_1 := 0.035
h_1 := 0.007
n := 6
z_1 := 18
k_шп := 1.5*10^11  # шпоночное
z := 6
d_2 := 0.032
D_2 := 0.045
l_2 := 0.015
h_2 := 0.008
z_2 := 32
B := 0.02
k_шл := 2.5*10^11  # шлицевое
d_3 := 0.035
D_3 := 0.05
l_3 := 0.05
z_3 := 20
G := 8*10^10
d_4 := 0.026
l_4 := 0.03
z_4 := 40
k_з := 3.75*10^9  # зубчатое
d_5 := 0.032
l_5 := 0.01
d_б := 0.010
l_6 := 0.2
k_ф := 1/2*n*(d_б/D_1)^2  # фланцевое
l_7 := 0.060
h_шл := (d_5 - d_4)/2  # высота шлица
J_pc1 := π*d_1^4/32  # полярный момент инерции поперечного сечения круглого вала
J_pc3 := π*D_1^4/32*(1 - d_1^4/D_1^4) = 9.75713e-6  # полярный момент инерции поперечного сечения круглого вала с центральным отверстием
c_1 := G*J_pc1/(l_6 + l_1/2) = 22195.4  # жёсткость вала от двигателя до шпонки. Положим длину входного вала равной l6
c_2 := k_шп*h_1*l_1*d_1^2 = 28812  # жёсткость шпонки на первом валу
c_3 := π*D_1^2*G/(32*l_2)*k_ф = 157079633  # жёсткость фланцевого соединения первых двух валов
c_4 := G*J_pc3/l_1 = 22302019  # жёсткость вала от фланца до первого зубчатого колеса
e_01 := 1/c_1 + 1/c_2 + 1/c_3 + 1/c_4 = 7.98134e-5  # податливость от двигателя до первого зубчатого колеса
c_12 := k_з*B*D_1^2 = 750000  # жёсткость соединения первого зубчатого колеса со вторым
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e_12 := 1/c_12 = 1.33333e-6
# податливость зубчатого соединения
# первого и второго колеса
J_pc23 := π*D_2^4/32*(1 - d_2^4/D_2^4)
c_23 := G*J_pc3/l_1 = 22302019  # жёсткость вала от второго зубчатого колеса до третьего
e_23 := 1/c_23 = 4.4839e-8  # податливость вала от второго зубчатого колеса до третьего
m := 6/1000
D_22 := m*z_3 = 0.12  # диаметр делительной окружности  третьего зубчатого колеса
c_34 := k_з*B*D_22^2 = 1080000  # жёсткость соединения третьего и четвёртого зубчатых колёс
e_34 := 1/c_34 = 9.25926e-7
# податливость зубчатого соединения
# третьего и четвёртого колеса
c_5 := k_шп*h_2*l_4*d_2^2 = 36864  # жёсткость шпонки на четвёртом валу
J_pc6 := π*d_2^4/32
c_6 := G*J_pc6/(l_4/2 + l_5) = 329420  # жёсткость четвёртого вала
J_pc7 := π*d_3^4/32
c_7 := G*J_pc7/l_6 = 58929.4  # жёсткость пятого вала
J_pc8 := π*d_4^4/32
c_8 := G*J_pc8/(l_7/2) = 119636  # Жёсткость выходного вала
c_9 := k_шл*h_шл*l_7*d_5^2*z = 276480  # Жёсткость шлицевого соединения на выходном валу
e_45 := 1/c_5 + 1/c_6 + 1/c_7 + 1/c_8 + 1/c_9 = 5.91074e-5  # податливость участка от шпонки на четвёртом валу до конца выходного вала
# передаточное отношение
# от первого зубчатого
# колеса к пятому
i_15 := (-z_2/z_1)*(-z_4/z_3) = 3.55556
i_25 := -z_4/z_3
i_45 := 1
# приведённая податливость
e_пр := e_01/i_15^2 + e_12/i_25^2 + e_23/i_25^2 + e_34/i_45^2 + e_45/i_45^2 = 6.66912e-5
# момент инерции исполнительного звена
J_ИЗ := J_z1 + J_y2 + J_y3 + m_3*(l3/2)^2 = 5.55897
# звено один вращается относительно оси з. Мешают только ей параллельные. Все ку неподвижны. Начальное положение
ζ_1 := 0.1
τ_1 := sqrt(J_ИЗ/(1/e_пр))
k_1 := 1/τ_1 = 51.936
# ускорение на траектории ab
ap := 1
at := 1
q1ab''(t) := ap1*t/t1 - ap1/t1*(t - t1)*Φ(t - t1) - ap1*Φ(t - t1) - at1*Φ(t - t2)
ε_0(t) := q1ab''(t)
t := 0, 2*π/(50*k_1) .. t3
Θ(t) := -integral(1/(k_1*sqrt(1 - ζ_1^2))*exp(-ζ_1*k_1*(t - η))*sin(k_1*sqrt(1 - ζ_1^2)*(t - η))*ε_0(η), η = 0 .. t)
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t := 0, 2*π/(15*k_1) .. t1
Θ(t) := -integral(1/(k_1*sqrt(1 - ζ_1^2))*exp(-ζ_1*k_1*(t - η))*sin(k_1*sqrt(1 - ζ_1^2)*(t - η))*ε_0(η), η = 0 .. t)
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t := t1, t1 + 2*π/(15*k_1) .. t2
Θ(t) := -integral(1/(k_1*sqrt(1 - ζ_1^2))*exp(-ζ_1*k_1*(t - η))*sin(k_1*sqrt(1 - ζ_1^2)*(t - η))*ε_0(η), η = t1 - 0.01 .. t)
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t := t2, t2 + 2*π/(15*k_1) .. t3
Θ(t) := -integral(1/(k_1*sqrt(1 - ζ_1^2))*exp(-ζ_1*k_1*(t - η))*sin(k_1*sqrt(1 - ζ_1^2)*(t - η))*ε_0(η), η = t2 - 0.01 .. t)
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