l1 := 0.8
l2 := 0.9
l3 := 1
a := 0.3
b := 0.2
c := 0.5
d := 0.3
q1 := 0  # disabled
q2 := 1  # disabled
q3 := 1  # disabled
# переход из левой СК в начальное
# положение в правой СК
# переход из начального положения
# в текущее в той же СК
# переход из левой СК
# в текущее положение в
# правой СК
H01' := [1, 0, 0, 0; 0, 1, 0, 0; 0, 0, 1, 0; 0, 0, 0, 1]
H1'1 := [cos(q1), -sin(q1), 0, 0; sin(q1), cos(q1), 0, 0; 0, 0, 1, 0; 0, 0, 0, 1]
H01 := H01'*H1'1
H01'*H1'1 → [cos(q1), -sin(q1), 0, 0; sin(q1), cos(q1), 0, 0; 0, 0, 1, 0; 0, 0, 0, 1]
H12' := [0, 0, 1, 0; 1, 0, 0, 0; 0, 1, 0, l1; 0, 0, 0, 1]
H2'2 := [cos(q2), -sin(q2), 0, 0; sin(q2), cos(q2), 0, 0; 0, 0, 1, 0; 0, 0, 0, 1]
H12 := H12'*H2'2
H12'*H2'2 → [0, 0, 1, 0; cos(q2), -sin(q2), 0, 0; sin(q2), cos(q2), 0, 0.8; 0, 0, 0, 1]
H23' := [1, 0, 0, 0; 0, 1, 0, l2; 0, 0, 1, 0; 0, 0, 0, 1]
H3'3 := [cos(q3), -sin(q3), 0, 0; sin(q3), cos(q3), 0, 0; 0, 0, 1, 0; 0, 0, 0, 1]
H23 := H23'*H3'3
H23'*H3'3 → [cos(q3), -sin(q3), 0, 0; sin(q3), cos(q3), 0, 0.9; 0, 0, 1, 0; 0, 0, 0, 1]
Rm3 := [l3; 0; 0; 1]  # положение схвата манипулятора в координатах 3 СК
Rm0 := H01*H12*H23*Rm3  # положение схвата манипулятора в координатах 0СК
Rm0 simplify → [
    0.45*cos(q1 - 1.0*q2) - 0.5*sin(q1 + q2 + q3) - 0.5*sin(q1 - 1.0*q2 - 1.0*q3) - 0.45*cos(q1 + q2);
    0.5*cos(q1 - 1.0*q2 - 1.0*q3) + 0.5*cos(q1 + q2 + q3) + 0.45*sin(q1 - 1.0*q2) - 0.45*sin(q1 + q2);
    sin(q2 + q3) + 0.9*cos(q2) + 0.8;
    1
]
Xm := Rm0[0]
Ym := Rm0[1]
Zm := Rm0[2]
q31 := asin((Xm^2 + Ym^2 + (Zm - l1)^2 - l3^2 - l2^2)/(2*l2*l3))
# почему-то всё равно берём левую | правую брать
cq22 := det([-sqrt(Xm^2 + Ym^2), -l3*sin(q31) - l2; Zm - l1, l3*cos(q31)])/det([l3*cos(q31), -l3*sin(q31) - l2; l3*sin(q31) + l2, l3*cos(q31)])
cq21 := -det([sqrt(Xm^2 + Ym^2), -l3*sin(q31) - l2; Zm - l1, l3*cos(q31)])/det([l3*cos(q31), -l3*sin(q31) - l2; l3*sin(q31) + l2, l3*cos(q31)])
sq22 := det([l3*cos(q31), -sqrt(Xm^2 + Ym^2); l3*sin(q31) + l2, Zm - l1])/det([l3*cos(q31), -l3*sin(q31) - l2; l3*sin(q31) + l2, l3*cos(q31)])
sq21 := det([l3*cos(q31), sqrt(Xm^2 + Ym^2); l3*sin(q31) + l2, Zm - l1])/det([l3*cos(q31), -l3*sin(q31) - l2; l3*sin(q31) + l2, l3*cos(q31)])
q22 := atan2(cq22, sq22)
q21 := atan2(cq21, sq21)
sq11 := (Xm/(l3*cos(q21 + q31) - l2*sin(q21)))
sq12 := (Xm/(l3*cos(q22 + q31) - l2*sin(q22)))
cq11 := (Ym/(l3*cos(q21 + q31) - l2*sin(q21)))
cq12 := (Ym/(l3*cos(q22 + q31) - l2*sin(q22)))
q11 := atan2(cq11, sq11)
q12 := atan2(cq12, sq12)
t3 := 1.5  # Время, в которое схват окажется в точке B и начнёт рисовать спираль
R := 0.2
V := 0.6
h := 0.4
tp := 6*π*R/V = 6.28319  # время рисования
t := t3, t3 + 0.1 .. t3 + tp
α(t) := V*(t - t3)/R  # центральный угол. смотреть на спираль сверху
γ := atan(h/(2*π*R))  # угол подъёма. смотреть на спираль сбоку
xst(t) := -R*sin(α(t))
yst(t) := R*cos(α(t))
zst(t) := 3*h - V*(t - t3)*tan(γ)
t4 := t3 + tp  # Время, в которое схват окажется в точке С, точке конца таектории
Rmst(t) := [xst(t); yst(t); zst(t)]  # траектория винта в его СК
F := CreateSpace(Rmst, t3, t4, 1000)
# [component: inputs F]
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H0st := [1, 0, 0, 0; 0, 1, 0, 1.3; 0, 0, 1, 0.1; 0, 0, 0, 1]  # матрица перехода из 0 СК в СК стола (у меня его нет, но это как бы СК, в которых рисуется винт)
Rmst(t) := [xst(t); yst(t); zst(t); 1]  # траектория винта в его личной СК
Rmb0(t) := H0st*Rmst(t)  # описание траектории в нулевой СК
Rmb0(t3) = [0; 1.5; 1.3; 1]  # положение манипулятора (в СК0) в момент начала рисования траектории
Rmb0(t4) = [0; 1.5; 0.1; 1]  # положение манипулятора (в СК0) в момент окончания рисования траектории
x(t) := Rmb0(t)[0]
y(t) := Rmb0(t)[1]
z(t) := Rmb0(t)[2]
# Задание законов изменения входных координат как функций от времени при следовании по заданной траектории
q3bc(t) := asin((x(t)^2 + y(t)^2 + (z(t) - l1)^2 - l3^2 - l2^2)/(2*l2*l3))
cq22bc(t) := det([sqrt(x(t)^2 + y(t)^2), -l3*sin(q3bc(t)) - l2; z(t) - l1, l3*cos(q3bc(t))])/det([l3*cos(q3bc(t)), -l3*sin(q3bc(t)) - l2; l3*sin(q3bc(t)) + l2, l3*cos(q3bc(t))])
sq22bc(t) := det([l3*cos(q3bc(t)), sqrt(x(t)^2 + y(t)^2); l3*sin(q3bc(t)) + l2, z(t) - l1])/det([l3*cos(q3bc(t)), -l3*sin(q3bc(t)) - l2; l3*sin(q3bc(t)) + l2, l3*cos(q3bc(t))])
q22bc(t) := atan2(cq22bc(t), sq22bc(t))
sq12bc(t) := (-x(t)/(l3*cos(q22bc(t) + q3bc(t)) - l2*sin(q22bc(t))))
cq12bc(t) := (y(t)/(l3*cos(q22bc(t) + q3bc(t)) - l2*sin(q22bc(t))))
q12bc(t) := atan2(cq12bc(t), sq12bc(t))
# Проверяем, что в 0 ск траетория строится правильно
rm0(t) := [
    -sin(q12bc(t))*(l3*cos(q22bc(t) + q3bc(t)) - l2*sin(q22bc(t)));
    cos(q12bc(t))*(l3*cos(q22bc(t) + q3bc(t)) - l2*sin(q22bc(t)));
    l1 + l3*sin(q22bc(t) + q3bc(t)) + l2*cos(q22bc(t))
]
N := CreateSpace(rm0, t3, t4, 100)
# [component: inputs N]
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# Определение первых и вторых производных входных координат:
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dq3bc(t) := d/dt(q3bc(t))
dq22bc(t) := d/dt(q22bc(t))
dq12bc(t) := d/dt(q12bc(t))
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ddq3bc(t) := d/dt(dq3bc(t))
ddq22bc(t) := d/dt(dq22bc(t))
ddq12bc(t) := d/dt(dq12bc(t))
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t1 := 0.5  # до этого времени разгоняемся
t2 := 1  # до этого времени едем с постоянной скоростью
t3 = 1.5  # до этого времени тормозим
Φ(t) :=
    1 if t ≥ 0
    0 otherwise  # функция Хэвисайда
ap := 1  # disabled
at := 1  # disabled
# ускорения на участках разгона
# и торможения соответственно
t := 0, 0.1 .. t3
# Общий вид закона ускорения входных координат в момент
# подвода схвата робота к началу траектории
qsab''(t) := ap*t/t1 - ap/t1*(t - t1)*Φ(t - t1) - ap*Φ(t - t1) - at*Φ(t - t2)
qsab'(t) := ap*t^2/(2*t1) - ap*(t - t1)^2/(2*t1)*Φ(t - t1) - ap*(t - t1)*Φ(t - t1) - at*(t - t2)*Φ(t - t2)
qsab(t) := ap*t^3/(6*t1) - ap*(t - t1)^3/(6*t1)*Φ(t - t1) - ap*(t - t1)^2/2*Φ(t - t1) - at*(t - t2)^2/2*Φ(t - t2)
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qsab(t3) simplify → 0.291666666667*ap - 0.125*at
qsab'(t3) simplify → 0.25*ap - 0.5*at
# Для каждого входа находим пару ускорений: ускорение разгона и ускорение торможения:
# При этом учитываем, что qab(t3)=qbc(t3) и qab`(t3)=qbc`(t3)
ap1 := det([q12bc(t3), -0.125; dq12bc(t3 + 0.0001), -0.5])/det([0.291666666667, -0.125; 0.25, -0.5]) = -0.436364
at1 := det([0.291666666667, q12bc(t3); 0.25, dq12bc(t3 + 0.0001)])/det([0.291666666667, -0.125; 0.25, -0.5]) = -1.01818
ap2 := det([q22bc(t3), -0.125; dq22bc(t3 + 0.0001), -0.5])/det([0.291666666667, -0.125; 0.25, -0.5]) = -2.67086
at2 := det([0.291666666667, q22bc(t3); 0.25, dq22bc(t3 + 0.0001)])/det([0.291666666667, -0.125; 0.25, -0.5]) = -1.23021
ap3 := det([q3bc(t3), -0.125; dq3bc(t3 + 0.0001), -0.5])/det([0.291666666667, -0.125; 0.25, -0.5]) = 1.84229
at3 := det([0.291666666667, q3bc(t3); 0.25, dq3bc(t3 + 0.0001)])/det([0.291666666667, -0.125; 0.25, -0.5]) = 1.15146
q1ab''(t) := ap1*t/t1 - ap1/t1*(t - t1)*Φ(t - t1) - ap1*Φ(t - t1) - at1*Φ(t - t2)
q2ab''(t) := ap2*t/t1 - ap2/t1*(t - t1)*Φ(t - t1) - ap2*Φ(t - t1) - at2*Φ(t - t2)
q1ab'(t) := ap1*t^2/(2*t1) - ap1*(t - t1)^2/(2*t1)*Φ(t - t1) - ap1*(t - t1)*Φ(t - t1) - at1*(t - t2)*Φ(t - t2)
q2ab'(t) := ap2*t^2/(2*t1) - ap2*(t - t1)^2/(2*t1)*Φ(t - t1) - ap2*(t - t1)*Φ(t - t1) - at2*(t - t2)*Φ(t - t2)
q1ab(t) := ap1*t^3/(6*t1) - ap1*(t - t1)^3/(6*t1)*Φ(t - t1) - ap1*(t - t1)^2/2*Φ(t - t1) - at1*(t - t2)^2/2*Φ(t - t2)
q2ab(t) := ap2*t^3/(6*t1) - ap2*(t - t1)^3/(6*t1)*Φ(t - t1) - ap2*(t - t1)^2/2*Φ(t - t1) - at2*(t - t2)^2/2*Φ(t - t2)
q3ab''(t) := ap3*t/t1 - ap3/t1*(t - t1)*Φ(t - t1) - ap3*Φ(t - t1) - at3*Φ(t - t2)
q3ab'(t) := ap3*t^2/(2*t1) - ap3*(t - t1)^2/(2*t1)*Φ(t - t1) - ap3*(t - t1)*Φ(t - t1) - at3*(t - t2)*Φ(t - t2)
q3ab(t) := ap3*t^3/(6*t1) - ap3*(t - t1)^3/(6*t1)*Φ(t - t1) - ap3*(t - t1)^2/2*Φ(t - t1) - at3*(t - t2)^2/2*Φ(t - t2)
q1(t) :=
    q1ab(t) if 0 ≤ t ≤ t3
    q12bc(t) if t3 ≤ t ≤ t4
q2(t) :=
    q2ab(t) if 0 ≤ t ≤ t3
    q22bc(t) if t3 ≤ t ≤ t4
q3(t) :=
    q3ab(t) if 0 ≤ t ≤ t3
    q3bc(t) if t3 ≤ t ≤ t4
dq1(t) :=
    q1ab'(t) if 0 ≤ t ≤ t3
    dq12bc(t) if t3 ≤ t ≤ t4
dq2(t) :=
    q2ab'(t) if 0 ≤ t ≤ t3
    dq22bc(t) if t3 ≤ t ≤ t4
dq3(t) :=
    q3ab'(t) if 0 ≤ t ≤ t3
    dq3bc(t) if t3 ≤ t ≤ t4
ddq1(t) :=
    q1ab''(t) if 0 ≤ t ≤ t3
    ddq12bc(t) if t3 ≤ t ≤ t4
ddq2(t) :=
    q2ab''(t) if 0 ≤ t ≤ t3
    ddq22bc(t) if t3 ≤ t ≤ t4
ddq3(t) :=
    q3ab''(t) if 0 ≤ t ≤ t3
    ddq3bc(t) if t3 ≤ t ≤ t4
t := 0, 0.1 .. t4
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Rm0(t) := [
    -sin(q1(t))*(l3*cos(q2(t) + q3bc(t)) - l2*sin(q2(t)));
    cos(q1(t))*(l3*cos(q2(t) + q3bc(t)) - l2*sin(q2(t)));
    l1 + l3*sin(q2(t) + q3(t)) + l2*cos(q2(t))
]
Q := CreateSpace(Rm0, 0, t4, 100)
# [component: inputs Q]
# Угловые скорости звеньев
A01(t) := [cos(q1(t)), -sin(q1(t)), 0; sin(q1(t)), cos(q1(t)), 0; 0, 0, 1]
H01 := H01'*H1'1 → [cos(q1), -sin(q1), 0, 0; sin(q1), cos(q1), 0, 0; 0, 0, 1, 0; 0, 0, 0, 1]  # error: This value must be a scalar.
A12(t) := [0, 0, 1; cos(q2(t)), -sin(q2(t)), 0; sin(q2(t)), cos(q2(t)), 0]
H12 := H12'*H2'2 → [0, 0, 1, 0; cos(q2), -sin(q2), 0, 0; sin(q2), cos(q2), 0, 0.8; 0, 0, 0, 1]  # error: This value must be a scalar.
A23(t) := [cos(q3(t)), -sin(q3(t)), 0; sin(q3(t)), cos(q3(t)), 0; 0, 0, 1]
H23 := H23'*H3'3 → [cos(q3), -sin(q3), 0, 0; sin(q3), cos(q3), 0, 0.9; 0, 0, 1, 0; 0, 0, 0, 1]  # error: This value must be a scalar.
Ω00(t) := [0; 0; 0]
ω11(t) := [0; 0; dq1(t)]
ω22(t) := [0; 0; dq2(t)]
ω33(t) := [0; 0; dq3(t)]
Ω01(t) := transpose(A01(t))*Ω00(t)
Ω11(t) := Ω01(t) + ω11(t)
Ω12(t) := transpose(A12(t))*Ω11(t)
Ω22(t) := Ω12(t) + ω22(t)
Ω23(t) := transpose(A23(t))*Ω22(t)
Ω33(t) := Ω23(t) + ω33(t)
# Угловые ускорения звеньев
E00(t) := [0; 0; 0]
ε11(t) := [0; 0; ddq1(t)]
ε22(t) := [0; 0; ddq2(t)]
ε33(t) := [0; 0; ddq2(t)]
E11(t) := transpose(A01(t))*E00(t) + Ω11(t)×ω11(t) + ε11(t)
E22(t) := transpose(A12(t))*E11(t) + Ω22(t)×ω22(t) + ε22(t)
E33(t) := transpose(A23(t))*E22(t) + Ω33(t)×ω33(t) + ε33(t)
# Определение скоростей точек звеньев
ro10(t) := [0; 0; 0]
ro21(t) := [0; 0; l1]
ro32(t) := [0; l2; 0]
rM3(t) := [l3; 0; 0]
Vo00(t) := [0; 0; 0]
νo10(t) := [0; 0; 0]
νo21(t) := [0; 0; 0]
νo32(t) := [0; 0; 0]
Vo11(t) := transpose(A01(t))*(Vo00(t) + Ω00(t)×ro10(t) + νo10(t))
Vo22(t) := transpose(A12(t))*(Vo11(t) + Ω11(t)×ro21(t) + νo21(t))
Vo33(t) := transpose(A23(t))*(Vo22(t) + Ω22(t)×ro32(t) + νo32(t))
VM3(t) := Vo33(t) + Ω33(t)×rM3(t)
modVM3(t) := sqrt(VM3(t)[0]^2 + VM3(t)[1]^2 + VM3(t)[2]^2)
Rm0(t) := [
    -sin(q1(t))*(l3*cos(q2(t) + q3(t)) - l2*sin(q2(t)));
    cos(q1(t))*(l3*cos(q2(t) + q3(t)) - l2*sin(q2(t)));
    l1 + l3*sin(q2(t) + q3(t)) + l2*cos(q2(t))
]
modVM0(t) := sqrt((d/dt(Rm0(t)[0]))^2 + (d/dt(Rm0(t)[1]))^2 + (d/dt(Rm0(t)[2]))^2)
t := 0, 0.1 .. t4
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# Определение ускорений точек звеньев
Wo00(t) := [0; 0; 0]
Wo10(t) := [0; 0; 0]
Wo21(t) := [0; 0; 0]
Wo32(t) := [0; 0; 0]
Wo11(t) := transpose(A01(t))*(Wo00(t) + E00(t)×ro10(t) + Ω00(t)×(Ω00(t)×ro10(t)) + 2*Ω00(t)×νo10(t) + Wo10(t))
Wo22(t) := transpose(A12(t))*(Wo11(t) + E11(t)×ro21(t) + Ω11(t)×(Ω11(t)×ro21(t)) + 2*Ω11(t)×νo21(t) + Wo21(t))
Wo33(t) := transpose(A23(t))*(Wo22(t) + E22(t)×ro32(t) + Ω22(t)×(Ω22(t)×ro32(t)) + 2*Ω22(t)×νo32(t) + Wo32(t))
Wm3(t) := Wo33(t) + E33(t)×rM3(t) + Ω33(t)×(Ω33(t)×rM3(t))
modWm3(t) := sqrt(Wm3(t)[0]^2 + Wm3(t)[1]^2 + Wm3(t)[2]^2)
modW_M0(t) := sqrt((d^2/dt^2(Rm0(t)[0]))^2 + (d^2/dt^2(Rm0(t)[1]))^2 + (d^2/dt^2(Rm0(t)[2]))^2)
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# Скорости и ускорения центров масс звеньев
rc11 := [0; 0; l1/2]
Vc11(t) := Vo11(t) + Ω11(t)×rc11
Wc11(t) := Wo11(t) + E11(t)×rc11 + Ω11(t)×(Ω11(t)×rc11)
rc22 := [0; l2/2; 0]
Vc22(t) := Vo22(t) + Ω22(t)×rc22
Wc22(t) := Wo22(t) + E22(t)×rc22 + Ω22(t)×(Ω22(t)×rc22)
rc33 := [l3/2; 0; 0]
Vc33(t) := Vo33(t) + Ω33(t)×rc33
Wc33(t) := Wo33(t) + E33(t)×rc33 + Ω33(t)×(Ω33(t)×rc33)
# Динамика робота с жесткими звеньями
ρ := 7800
R_1 := 0.1*l1
R_2 := 0.05*l2
R_3 := 0.025*l3  # радиусы звеньев
m_1 := ρ*π*R_1^2*l1 = 125.463
m_2 := ρ*π*R_2^2*l2 = 44.6593
m_3 := ρ*π*R_3^2*l3 = 15.3153  # массы звеньев
J_z1 := m_1*R_1^2/2
J_x1 := m_1/12*((3*R_1)^2 + l1^2)
J_y1 := m_1/12*((3*R_1)^2 + l1^2)
Ic1 := [J_x1, 0, 0; 0, J_y1, 0; 0, 0, J_z1]
J_x2 := m_2/12*((3*R_2)^2 + l2^2)
J_z2 := m_2/12*((3*R_2)^2 + l2^2)
J_y2 := m_2*R_2^2/2
Ic2 := [J_x2, 0, 0; 0, J_y2, 0; 0, 0, J_z2]
J_x3 := m_3*R_3^2/2
J_y3 := m_3/14*((3*R_3)^2 + l3^2)
J_z3 := m_3/14*((3*R_3)^2 + l3^2)
Ic3 := [J_x3, 0, 0; 0, J_y3, 0; 0, 0, J_z3]
# силы и моменты инерции
F_11(t) := -m_1*Wc11(t)
L_C11(t) := -(Ic1*E11(t) + Ω22(t)×(Ic1*Ω11(t)))
F_22(t) := -m_2*Wc22(t)
L_C22(t) := -(Ic2*E22(t) + Ω22(t)×(Ic2*Ω22(t)))
F_33(t) := -m_3*Wc33(t)
L_C33(t) := -(Ic3*E33(t) + Ω33(t)×(Ic3*Ω33(t)))
g := 9.8
A03(t) := A01(t)*A12(t)*A23(t)
G_10 := [0; 0; -m_1*g]
G_20 := [0; 0; -m_2*g]
G_30 := [0; 0; -m_3*g]
A02(t) := A01(t)*A12(t)
G_11(t) := transpose(A01(t))*G_10
G_22(t) := transpose(A02(t))*G_20
G_33(t) := transpose(A03(t))*G_30
# 3-е звено:
R_23(t) := -G_33(t) - F_33(t)
C3O3(t) := [-l3/2; 0; 0]
M_23(t) := -L_C33(t) - C3O3(t)×R_23(t)
Q_3(t) := R_23(t)[0]
# 2-е звено
R_32(t) := -A23(t)*R_23(t)
C2O2(t) := [0; -l2/2; 0]
C2O3(t) := [0; l2/2; 0]
R_12(t) := -R_32(t) - G_22(t) - F_22(t)
M_32(t) := -A23(t)*M_23(t)
M_12(t) := -M_32(t) - L_C22(t) - C2O2(t)×R_32(t) - C2O3(t)×R_12(t)
Q_2(t) := R_12(t)[0]
t := 0, 5 .. t4
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# 1-е звено
R_21(t) := -A12(t)*R_12(t)
R_01(t) := -R_21(t) - G_11(t) - F_11(t)
C1O2 := [0; l1/2; 0]
C1O1 := [0; -l1/2; 0]
M_21(t) := -A12(t)*M_12(t)
M_01(t) := -M_21(t) - L_C11(t) - C1O2×R_21(t) - C1O1×R_01(t)
Q_1(t) := M_01(t)[2]
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