l1 := 0.8
l2 := 0.9
l3 := 1
a := 0.3
b := 0.2
c := 0.5
d := 0.3
q1 := 0  # disabled
q2 := 1  # disabled
q3 := 1  # disabled
# переход из левой СК в начальное
# положение в правой СК
# переход из начального положения
# в текущее в той же СК
# переход из левой СК
# в текущее положение в
# правой СК
H01' := [1, 0, 0, 0; 0, 1, 0, 0; 0, 0, 1, 0; 0, 0, 0, 1]
H1'1 := [cos(q1), -sin(q1), 0, 0; sin(q1), cos(q1), 0, 0; 0, 0, 1, 0; 0, 0, 0, 1]
H01 := H01'*H1'1
H12' := [0, 0, 1, 0; 1, 0, 0, 0; 0, 1, 0, l1; 0, 0, 0, 1]
H2'2 := [cos(q2), -sin(q2), 0, 0; sin(q2), cos(q2), 0, 0; 0, 0, 1, 0; 0, 0, 0, 1]
H12 := H12'*H2'2
H23' := [1, 0, 0, 0; 0, 1, 0, l2; 0, 0, 1, 0; 0, 0, 0, 1]
H3'3 := [cos(q3), -sin(q3), 0, 0; sin(q3), cos(q3), 0, 0; 0, 0, 1, 0; 0, 0, 0, 1]
H23 := H23'*H3'3
Rm3 := [l3; 0; 0; 1]  # начальное положение манипулятора в 3 СК
Rm0 := H01*H12*H23*Rm3
Rm0 simplify → [
    0.45*cos(q1 - 1.0*q2) - 0.5*sin(q1 + q2 + q3) - 0.5*sin(q1 - 1.0*q2 - 1.0*q3) - 0.45*cos(q1 + q2);
    0.5*cos(q1 - 1.0*q2 - 1.0*q3) + 0.5*cos(q1 + q2 + q3) + 0.45*sin(q1 - 1.0*q2) - 0.45*sin(q1 + q2);
    sin(q2 + q3) + 0.9*cos(q2) + 0.8;
    1
]
Xm := Rm0[0]
Ym := Rm0[1]
Zm := Rm0[2]
q31 := asin((Xm^2 + Ym^2 + (Zm - l1)^2 - l3^2 - l2^2)/(2*l2*l3))
# правую брать
cq22 := det([-sqrt(Xm^2 + Ym^2), -l3*sin(q31) - l2; Zm - l1, l3*cos(q31)])/det([l3*cos(q31), -l3*sin(q31) - l2; l3*sin(q31) + l2, l3*cos(q31)])
cq21 := -det([sqrt(Xm^2 + Ym^2), -l3*sin(q31) - l2; Zm - l1, l3*cos(q31)])/det([l3*cos(q31), -l3*sin(q31) - l2; l3*sin(q31) + l2, l3*cos(q31)])
sq22 := det([l3*cos(q31), -sqrt(Xm^2 + Ym^2); l3*sin(q31) + l2, Zm - l1])/det([l3*cos(q31), -l3*sin(q31) - l2; l3*sin(q31) + l2, l3*cos(q31)])
sq21 := det([l3*cos(q31), sqrt(Xm^2 + Ym^2); l3*sin(q31) + l2, Zm - l1])/det([l3*cos(q31), -l3*sin(q31) - l2; l3*sin(q31) + l2, l3*cos(q31)])
q22 := atan2(cq22, sq22)
q21 := atan2(cq21, sq21)
sq11 := (Xm/(l3*cos(q21 + q31) - l2*sin(q21)))
sq12 := (Xm/(l3*cos(q22 + q31) - l2*sin(q22)))
cq11 := (Ym/(l3*cos(q21 + q31) - l2*sin(q21)))
cq12 := (Ym/(l3*cos(q22 + q31) - l2*sin(q22)))
q11 := atan2(cq11, sq11)
q12 := atan2(cq12, sq12)
t3 := 1.5  # Это будет время дохождения до точки В, в которой начинаем рисовать
R := 0.2
V := 0.6
h := 0.4
tp := 6*π*R/V = 6.28319  # время рисования
t := t3, t3 + 0.1 .. t3 + tp
α(t) := V*(t - t3)/R  # центральный угол. смотреть на спираль сверху
γ := atan(h/(2*π*R))  # угол подъёма. смотреть на спираль сбоку
xst(t) := -R*sin(α(t))
yst(t) := R*cos(α(t))
zst(t) := 3*h - V*(t - t3)*tan(γ)
Rmst(t) := [xst(t); yst(t); zst(t)]  # траектория винта в его личной СК
t4 := t3 + tp
F := CreateSpace(Rmst, t3, t4, 1000)
# [component: inputs F]
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H0st := [1, 0, 0, 0; 0, 1, 0, 1.5; 0, 0, 1, 0; 0, 0, 0, 1]  # матрица поворота из 0 СК в СК стола (у меня его нет, но это как бы место начала траеткории)
Rmst(t) := [xst(t); yst(t); zst(t); 1]
Rmb0(t) := H0st*Rmst(t)  # описание траектории в нулевой СК
x(t) := Rmb0(t)[0]
y(t) := Rmb0(t)[1]
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z(t) := Rmb0(t)[2]
q3bc(t) := asin((x(t)^2 + y(t)^2 + (z(t) - l1)^2 - l3^2 - l2^2)/(2*l2*l3))
Rmb0(t3) = [0; 1.7; 1.2; 1]
cq22bc(t) := det([sqrt(x(t)^2 + y(t)^2), -l3*sin(q3bc(t)) - l2; z(t) - l1, l3*cos(q3bc(t))])/det([l3*cos(q3bc(t)), -l3*sin(q3bc(t)) - l2; l3*sin(q3bc(t)) + l2, l3*cos(q3bc(t))])
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sq22bc(t) := det([l3*cos(q3bc(t)), sqrt(x(t)^2 + y(t)^2); l3*sin(q3bc(t)) + l2, z(t) - l1])/det([l3*cos(q3bc(t)), -l3*sin(q3bc(t)) - l2; l3*sin(q3bc(t)) + l2, l3*cos(q3bc(t))])
q22bc(t) := atan2(cq22bc(t), sq22bc(t))
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sq12bc(t) := (-x(t)/(l3*cos(q22bc(t) + q3bc(t)) - l2*sin(q22bc(t))))
cq12bc(t) := (y(t)/(l3*cos(q22bc(t) + q3bc(t)) - l2*sin(q22bc(t))))
q12bc(t) := atan2(cq12bc(t), sq12bc(t))
q3bc(t3) = 43.5422 deg
rm0(t) := [
    -sin(q12bc(t))*(l3*cos(q22bc(t) + q3bc(t)) - l2*sin(q22bc(t)));
    cos(q12bc(t))*(l3*cos(q22bc(t) + q3bc(t)) - l2*sin(q22bc(t)));
    l1 + l3*sin(q22bc(t) + q3bc(t)) + l2*cos(q22bc(t))
]
q22bc(t3) = -52.2365 deg
q12bc(t3) = 0
N := CreateSpace(rm0, t3, t4, 100)
# [component: inputs N]
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# Почему-то х получается как в противофазе. Объяснения этому тоже не нашёл
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dq3bc(t) := d/dt(q3bc(t))
dq22bc(t) := d/dt(q22bc(t))
dq12bc(t) := d/dt(q12bc(t))
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t1 := 0.5  # до этого времени разгоняемся
t2 := 1  # до этого времени едем с постоянной скоростью
t3 = 1.5  # до этого времени тормозим
Φ(t) :=
    1 if t ≥ 0
    0 otherwise  # самодельная функция Хэвисайда
ap := 1
at := 1
qsab''(t) := 2*ap*t/t1 - ap*(t - t1/2)*Φ(t - t1/2) - ap*Φ(t - t1) - at*Φ(t - t2)
qsab'(t) := 2*ap*t^2/(2*t1) - ap*(t - t1/2)^2/2*Φ(t - t1/2) - ap*(t - t1)^2/2*Φ(t - t1) - at*(t - t2)^2/2*Φ(t - t2)
qsab(t) := 2*ap*t^3/(6*t1) - ap*(t - t1/2)^3/6*Φ(t - t1/2) - ap*(t - t1)^3/6*Φ(t - t1) - at*(t - t2)^3/6*Φ(t - t2)
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