# Угловые скорости звеньев
A01 := [cos(q1), -sin(q1), 0; sin(q1), cos(q1), 0; 0, 0, 1]
A12 := [0, 0, 1; cos(q2), -sin(q2), 0; sin(q2), cos(q2), 0]
A23 := [cos(q3), -sin(q3), 0; sin(q3), cos(q3), 0; 0, 0, 1]
Ω00 := [0; 0; 0]
ω11 := [0; 0; dq1]
ω22 := [0; 0; dq2]
ω33 := [0; 0; dq3]
Ω01 := transpose(A01)*Ω00
Ω11 := Ω01 + ω11
Ω12 := transpose(A12)*Ω11
Ω22 := Ω12 + ω22
Ω23 := transpose(A23)*Ω22
Ω33 := Ω23 + ω33
# Угловые ускорения звеньев
E00 := [0; 0; 0]
ε11 := [0; 0; ddq1]
ε22(t) := [0; 0; ddq2]
ε33(t) := [0; 0; ddq2]
E11 := transpose(A01)*E00 + Ω11×ω11 + ε11
E22 := transpose(A12)*E11 + Ω22×ω22 + ε22
E33 := transpose(A23)*E22 + Ω33×ω33 + ε33
# Определение скоростей точек звеньев
ro10 := [0; 0; 0]
ro21 := [0; 0; l1]
ro32 := [0; l2; 0]
rM3 := [l3; 0; 0]
Vo00 := [0; 0; 0]
νo10 := [0; 0; 0]
νo21 := [0; 0; 0]
νo32 := [0; 0; 0]
Vo11 := transpose(A01)*(Vo00 + Ω00×ro10 + νo10)
Vo22 := transpose(A12)*(Vo11 + Ω11×ro21 + νo21)
Vo33 := transpose(A23)*(Vo22 + Ω22×ro32 + νo32)
VM3 := Vo33 + Ω33×rM3
# Определение ускорений точек звеньев
Wo00 := [0; 0; 0]
Wo10 := [0; 0; 0]
Wo21 := [0; 0; 0]
Wo32 := [0; 0; 0]
Wo11 := transpose(A01)*(Wo00 + E00×ro10 + Ω00×(Ω00×ro10) + 2*Ω00×νo10 + Wo10)
Wo22 := transpose(A12)*(Wo11 + E11×ro21 + Ω11×(Ω11×ro21) + 2*Ω11×νo21 + Wo21)
Wo33 := transpose(A23)*(Wo22 + E22×ro32 + Ω22×(Ω22×ro32) + 2*Ω22×νo32 + Wo32)
Wm3 := Wo33 + E33×rM3 + Ω33×(Ω33×rM3)
# Скорости и ускорения центров масс звеньев
rc11 := [0; 0; l1/2]
Vc11 := Vo11 + Ω11×rc11
Wc11 := Wo11 + E11×rc11 + Ω11×(Ω11×rc11)
rc22 := [0; l2/2; 0]
Vc22 := Vo22 + Ω22×rc22
Wc22 := Wo22 + E22×rc22 + Ω22×(Ω22×rc22)
rc33 := [l3/2; 0; 0]
Vc33 := Vo33 + Ω33×rc33
Wc33 := Wo33 + E33×rc33 + Ω33×(Ω33×rc33)
# Динамика робота с жесткими звеньями
Ic1 := [J_x1, 0, 0; 0, J_y1, 0; 0, 0, J_z1]
Ic2 := [J_x2, 0, 0; 0, J_y2, 0; 0, 0, J_z2]
Ic3 := [J_x3, 0, 0; 0, J_y3, 0; 0, 0, J_z3]
T_1 := 1/2*m_1*transpose(Vc11)*Vc11 + 1/2*transpose(Ω11)*(Ic1*Ω11)
T_2 := 1/2*m_2*transpose(Vc22)*Vc22 + 1/2*transpose(Ω22)*(Ic2*Ω22)
T_3 := 1/2*m_3*transpose(Vc33)*Vc33 + 1/2*transpose(Ω33)*(Ic3*Ω33)
T := T_1 + T_2 + T_3
dTdq1 := d/dq1(T) → 0
dTddq1 := d/dq1(T) → 0
dTdq2 := d/dq2(T)
dTddq2 := d/dq2(T)
